# PWM arduino 1kHz, 1% 1kHz/100
mohm := 0.001 ohm
kohm := 1000 ohm
us := μs
nH := 1*10^-9*H
t1 := 1 kHz
T1 := 1/t1 = 1000 us
T1 := T1/100 = 10 us
# IRFZ44N
V_th := 3 V
R_dson := 14.7*mohm
V_gs := 20 V
R_g := 1*kohm  # <<<to dobierasz
t := 50 ns
C_rss := 88 pF
V_ds := 20 V
# RISING | FALLING
t_r := (12 + 60)*ns = 72 ns
t_f := (44 + 45)*ns = 89 ns
C_iss := 1470 pF
C_oss := 360 pF
1/(4 MHz) = 250 ns
tau_r := R_g*C_iss
tau_r = 1470 ns
tau_f := R_g*C_oss
tau_f = 360 ns
V_09f := 1 - e^(-t_f/(R_g*C_oss))
V_09r := 1 - e^(-t_r/(R_g*C_iss)) = 0.0477994
V_09f = 0.219033
V_09r = 0.0477994
I_g := V_gs/R_g = 20 mA
P_R.g := V_gs*I_g = 0.4 W
I_d := V_ds/R_dson = 1360.54 A
63*nC/(V_gs/R_g) = 3150 ns
C_iss*V_gs/I_g = 1470 ns
C_gd := C_rss = 88 pF
63*nC/(100 ns) = 630 mA
C_gs := C_iss - C_gd = 1382 pF
dVdt := V_th/(R_g*C_gd) = 0.0340909 V/ns
V_gsr.akt := C_gd*V_ds/t_r*R_g*(1 - e^(-t_r/(R_g*C_iss))) = 1.16843 V
V_gsf.akt := C_gd*V_ds/t_r*R_g*(1 - e^(-t_f/(R_g*C_iss))) = 1.43606 V
L_s := 10*nH
Z_0 := sqrt(L_s/C_gs) = 2.68996 Ω  # to jest min Rg zeby nie wpadal w rezonans
Q := Z_0/R_g = 0.00268996
I_g := 80 mA
taur := C_iss*V_ds/I_g = 367.5 ns
tauf := C_oss*V_ds/I_g = 90 ns
V_ds/I_g = 250 Ω
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